// SBML level 3 version 1

function Rate_Law_for_reaction_CycDT_decay(kdcycd, CycDT)
  kdcycd*CycDT;
end

function Rate_Law_for_reaction_E2FT_decay(kde2f, kde2fa, CycA, E2FT)
  (kde2f + kde2fa*CycA)*E2FT;
end

function Rate_Law_for_reaction_Comp2_decay(kdise2f, comp2, kdprbp, JdpRb, kprbp, CycE, CycA, JpRbp, kde2f, kde2fa)
  kdise2f*comp2 + kdprbp*(comp2/(JdpRb + comp2)) + kprbp*(CycE + CycA)*(comp2/(JpRbp + comp2)) + (kde2f + kde2fa*CycA)*comp2;
end

function Rate_Law_for_reaction_CycET_decay(kdcyce, kdcycea, CycA, CycET)
  (kdcyce + kdcycea*CycA)*CycET;
end

function Rate_Law_for_reaction_CycAT_decay(kdcyca, kdcycac, Cdh1, CycAT)
  (kdcyca + kdcycac*Cdh1)*CycAT;
end

function Rate_Law_for_reaction_for_Myc_production(ksm, S)
  ksm*S;
end

function Rate_Law_for_reaction_for_CycET_production(kscyceb, kscycem, Myc, kscyce, E2F, khcyce)
  kscyceb + kscycem*Myc + kscyce*(E2F/(khcyce + E2F));
end

function Rate_Law_for_reaction_for_CycDT_production(kscycdm, Myc, kscycds, S)
  kscycdm*Myc + kscycds*S;
end

function Rate_Law_for_reaction_for_CycAT_production(kscyca, E2F, khcyca)
  kscyca*(E2F/(khcyca + E2F));
end

function Rate_Law_for_reaction_for_Myc_decay(kdm, myc)
  kdm*myc;
end

function Rate_Law_for_reaction_for_E2FT_production(kse2fb, kse2fm, Myc, kse2f, E2F, khe2f)
  kse2fb + kse2fm*Myc + kse2f*(E2F/(khe2f + E2F));
end

function Rate_Law_for_reaction_Comp1_production(kase2f, E2F, Rb, kdprbp, comp2, JdpRb)
  kase2f*E2F*Rb + kdprbp*(comp2/(JdpRb + comp2));
end

function Rate_Law_for_reaction_Comp1_decay(kdise2f, comp1, kprb, CycD, JpRb, kpprb, CycE, CycA, JpRbp, kde2f, kde2fa)
  kdise2f*comp1 + kprb*CycD*(comp1/(JpRb + comp1)) + kpprb*(CycE + CycA)*(comp1/(JpRbp + comp1)) + (kde2f + kde2fa*CycA)*comp1;
end

function Rate_Law_for_reaction_for_Comp2_production(kase2f, E2F, Rbp, kprb, CycD, comp1, JpRb)
  kase2f*E2F*Rbp + kprb*CycD*(comp1/(JpRb + comp1));
end

function Rate_Law_for_reaction_for_CkiT_production(kscki)
  kscki;
end

function Rate_Law_for_reaction_for_EmiC_decay(kdiscdh1, kdemi, kdemi1c, Cdh1, EmiC)
  (kdiscdh1 + kdemi + kdemi1c*Cdh1)*EmiC;
end

function Rate_Law_for_reaction_for_UbI_decay(kdubl, kdublc, Cdh1, Ubl)
  (kdubl + kdublc*Cdh1)*Ubl;
end

function Rate_Law_for_reaction_for_CycACki_production(kascki, CycA, CkiT, CycECki, CycDCki, CycACki)
  kascki*CycA*(CkiT - CycECki - CycDCki - CycACki);
end

function Rate_Law_for_reaction_for_Rbpp_production(kprbp, CycE, CycA, Rbp, Jprbp, Comp2, kpprb, Rb, Jpprb, Comp1)
  kprbp*(CycE + CycA)*(Rbp/(Jprbp + Rbp)) + kprbp*(CycE + CycA)*(Comp2/(Jprbp + Comp2)) + kpprb*(CycE + CycA)*(Rb/(Jpprb + Rb)) + kpprb*(CycE + CycA)*(Comp1/(Jpprb + Comp1));
end

function Rate_Law_for_reaction_for_Rbpp_decay(kdprbpp, Rbpp, Jdprb)
  kdprbpp*(Rbpp/(Jdprb + Rbpp));
end

function Rate_Law_for_reaction_for_CycACki_decay(kdiscki, kdcyca, kdcycac, Cdh1, kdcki, kdckic, CycE, CycA, UbI, CycACki)
  (kdiscki + kdcyca + kdcycac*Cdh1 + kdcki + kdckic*(CycE + CycA)*UbI)*CycACki;
end

function Rate_Law_for_reaction_for_Cdh1dp_production(kacdh1, Cdh1T, Cdh1dp, Jdpcdh1)
  kacdh1*((Cdh1T - Cdh1dp)/(Jdpcdh1 + (Cdh1T - Cdh1dp)));
end

function Rate_Law_for_reaction_for_Cdh1dp_decay(kicdh1e, CycE, kicdh1a, CycA, Cdh1dp, Jpcdh1)
  (kicdh1e*CycE + kicdh1a*CycA)*(Cdh1dp/(Jpcdh1 + Cdh1dp));
end

function Rate_Law_for_reaction_for_Emi1T_production(ksemi1, E2F, khemi1)
  ksemi1*(E2F/(khemi1 + E2F));
end

function Rate_Law_for_reactionfor_Rbp_production(kprb, CycD, Rb, JpRb, kdise2f, comp2, kde2f, kde2fa, CycA)
  kprb*CycD*(Rb/(JpRb + Rb)) + kdise2f*comp2 + (kde2f + kde2fa*CycA)*comp2;
end

function Rate_Law_for_reaction_for_Rbp_decay(kase2f, E2F, Rbp, kdprbp, JpRbp, kprbp, CycE, CycA, JpRb)
  kase2f*E2F*Rbp + kdprbp*(Rbp/(JpRb + Rbp)) + kprbp*(CycE + CycA)*(Rbp/(JpRbp + Rbp));
end

function Rate_Law_for_reaction_for_CycECki_decay(kdiscki, kdcyce, kcdycea, CycA, kdcki, kdckic, CycE, UbI, CycECki)
  (kdiscki + kdcyce + kcdycea*CycA + kdcki + kdckic*(CycE + CycA)*UbI)*CycECki;
end

function Rate_Law_for_reaction_for_Emi1T_decay(kdemi1, kdemi1c, Cdh1, Emi1T)
  (kdemi1 + kdemi1c*Cdh1)*Emi1T;
end

function Rate_Law_for_reaction_for_EmiC_production(Cdh1T, EmiC, kascdh1, Emi1T)
  kascdh1*(Cdh1T - EmiC)*(Emi1T - EmiC);
end

function Rate_Law_for_reaction_for_CycECki_production(kascki, CycD, CkiT, CycECki, CycDCki, CycACki)
  kascki*CycD*(CkiT - CycECki - CycDCki - CycACki);
end

function Rate_Law_for_reaction_for_CkiT_decay(kdcki, kdckic, CycE, CycA, Ubl, CkiT)
  (kdcki + kdckic*(CycE + CycA)*Ubl)*CkiT;
end

function Rate_Law_for_reaction_for_CycDCki_production(kascki, CycD, CkiT, CycECki, CycDCki, CycACki)
  kascki*CycD*(CkiT - CycECki - CycDCki - CycACki);
end

function Rate_Law_for_reaction_for_Cdh1_production(kacdh1, Cdh1T, EmiC, Cdh1, Jdpcdh1, Cdh1dp, kdiscdh1, kdemi, kdemi1c)
  kacdh1*((Cdh1T - EmiC - Cdh1)/(Jdpcdh1 + (Cdh1T - Cdh1dp))) + (kdiscdh1 + kdemi + kdemi1c*Cdh1)*(Cdh1dp - Cdh1);
end

function Rate_Law_for_reaction_for_UbI_production(ksubl)
  ksubl;
end

function Rate_Law_for_reaction_for_CycDCki_decay(kdiscki, kdcycd, kdcki, kdckic, CycE, CycA, UbI, CycDCki)
  (kdiscki + kdcycd + kdcki + kdckic*(CycE + CycA)*UbI)*CycDCki;
end

function Rate_Law_for_reaction_for_Cdh1_decay(kicdh1e, CycE, kicdh1a, CycA, Cdh1, Jpcdh1, Cdh1dp, kascdh1, Emi1T, EmiC)
  (kicdh1e*CycE + kicdh1a*CycA)*(Cdh1/(Jpcdh1 + Cdh1dp)) + kascdh1*Cdh1*(Emi1T - EmiC);
end

model Pandey2018_reversible_transition_between_quiescence_and_proliferation()
  // Pandey2018-reversible transition between quiescence and proliferation
  // model units - substance: substance, time: time, volume: volume, area: area, length: length, extent: substance

  // Compartments:
  compartment compartment = 1 volume;

  // Species:
  species Myc in compartment = 0;
  species CycDT in compartment = 0;
  species CycET in compartment = 0.119;
  species CycAT in compartment = 0;
  species E2FT in compartment = 0.106;
  species Comp1 in compartment = 0.105;
  species Comp2 in compartment = 0;
  species Rbp in compartment = 0;
  species CkiT in compartment = 0.2;
  species CycECki in compartment = 0.115;
  species CycDCki in compartment = 0;
  species CycACki in compartment = 0;
  species Cdh1dp in compartment = 1;
  species Emi1T in compartment = 0.002;
  species EmiC in compartment = 0.002;
  species Cdh1 in compartment = 0.998;
  species UbI in compartment = 0.02;
  species $E2F in compartment;
  species $Rb in compartment;
  species Rbpp in compartment = 0.001;
  species $CycE in compartment;
  species $CycD in compartment;
  species $CycA in compartment;
  species $Cdh1p in compartment;
  species $Cdh1T in compartment = 1;

  // Parameters:
  S = 1;
  Ksm = 0.1;
  Kdm = 0.1;
  Kscycdm = 0.004;
  Kscycds = 0.004;
  Kdcycd = 0.008;
  Kscyceb = 0.0001;
  Kscycem = 0;
  Kscyce = 0.004;
  Kdcyce = 0.001;
  Kdcycea = 0.01;
  Khcyce = 0.25;
  Kscyca = 0.008;
  Kdcyca = 0.004;
  Kdcycac = 0.5;
  Khcyca = 0.1;
  Kse2fm = 0;
  Kse2f = 0.004;
  Kde2f = 0.003;
  Kde2fa = 0.01;
  Khe2f = 0.25;
  RbT = 1;
  Kase2f = 100;
  Kdise2f = 1;
  Kprb = 5;
  Kdprbp = 1;
  Kppeb = 0.5;
  Kdprbpp = 0.1;
  Kprbp = 2;
  JpRb = 0.01;
  JpRbp = 0.05;
  JdpRb = 0.05;
  JppRb = 0.5;
  Kscki = 0.04;
  Kdcki = 0.2;
  Kascki = 100;
  Kdiscki = 0.1;
  Ksub1 = 0.004;
  Kdub1 = 0.002;
  Kdub1c = 0.2;
  Ksemi1 = 0.45;
  Kdemi1 = 0.2;
  Kdemi1c = 2;
  Khemi1 = 0.1;
  Kascdh1 = 100;
  Kdiscdh1 = 0.1;
  Kacdh1 = 0.1;
  Kicdh1e = 0.14;
  Kicdh1a = 0.2;
  JdpCdh1 = 0.02;
  JpCdh1 = 0.25;
  Kse2fb = 0.0003;
  Kdckic = 1;

  // Assignment rules:
  Rb := RbT - Rbp - Rbpp - Comp1 - Comp2;
  CycA := CycAT - CycACki;
  CycE := CycET - CycECki;
  CycD := CycDT - CycDCki;
  Cdh1p := Cdh1T - Cdh1 - EmiC;
  E2F := E2FT - Comp1 - Comp2;

  // Reactions:
  reaction_for_Cdh1dp_production: => Cdh1dp; compartment*Rate_Law_for_reaction_for_Cdh1dp_production(Kacdh1, Cdh1T, Cdh1dp, JdpCdh1);  // modifiers: Cdh1T

  // Unit definitions:
  unit length = metre;
  unit area = metre^2;
  unit volume = 1e-3 litre;
  unit time = second;
  unit substance = 1e-3 mole;
end
