// SBML level 3 version 1

model MODEL1610220001()
  // Bush2016 - Extended Carrousel model of GPCR-RGS
  // model units - substance: substance, time: time, volume: volume, area: area, length: length, extent: substance

  // Compartments:
  compartment PM = 3.92 volume;
  compartment cyt = 36.4 volume;

  // Species:
  species R in PM = Rtot/PM;
  species LR in PM = 0;
  species G in PM = Gtot/PM;
  species Gt in PM = 0;
  species Gd in PM = 0;
  species RG in PM = 0;
  species Gbg in PM = 0;
  species LRG in PM = 0;
  species LRGt in PM = 0;
  species RGd in PM = 0;
  species RGt in PM = 0;
  species LRGd in PM = 0;
  species LRrgs in PM = 0;
  species LRrgsG in PM = 0;
  species LRrgsGd in PM = 0;
  species LRrgsGt in PM = 0;
  species Rrgs in PM = 0;
  species RrgsG in PM = 0;
  species RrgsGd in PM = 0;
  species RrgsGt in PM = 0;
  species rgs in cyt = rgs_tot/cyt;

  // Parameters:
  L = 0;
  K_d_L_R = 5.6; K_d_L_R is "K_d_L·R";
  lambda = 1;
  lambda_t = 1;
  lambda_d = 1;
  K_d_R_G = 36; K_d_R_G is "K_d_R·G";
  eta = 1;
  rho = 1;
  k_Hf_Gt = 0.002;
  k_Ef_RG = 0.00062;
  k_Ef_LRG = 1.5;
  k_Hf_RGt = 0.002;
  Rtot = 3308;
  Gtot = 2042;
  var k_on_L_R; k_on_L_R is "k_on_L·R";
  k_off_L_R = 0.001; k_off_L_R is "k_off_L·R";
  var k_on_L_RG; k_on_L_RG is "k_on_L·RG";
  var k_off_L_RG; k_off_L_RG is "k_off_L·RG";
  var k_on_L_RGt; k_on_L_RGt is "k_on_L·RGt";
  var k_off_L_RGt; k_off_L_RGt is "k_off_L·RGt";
  var k_on_L_RGd; k_on_L_RGd is "k_on_L·RGd";
  var k_off_L_RGd; k_off_L_RGd is "k_off_L·RGd";
  var k_on_R_G; k_on_R_G is "k_on_R·G";
  k_off_R_G = 0.09; k_off_R_G is "k_off_R·G";
  var k_on_LR_G; k_on_LR_G is "k_on_LR·G";
  var k_off_LR_G; k_off_LR_G is "k_off_LR·G";
  var k_on_R_Gt; k_on_R_Gt is "k_on_R·Gt";
  var k_off_R_Gt; k_off_R_Gt is "k_off_R·Gt";
  var k_on_LR_Gt; k_on_LR_Gt is "k_on_LR·Gt";
  var k_off_LR_Gt; k_off_LR_Gt is "k_off_LR·Gt";
  var k_on_R_Gd; k_on_R_Gd is "k_on_R·Gd";
  var k_off_R_Gd; k_off_R_Gd is "k_off_R·Gd";
  var k_on_LR_Gd; k_on_LR_Gd is "k_on_LR·Gd";
  var k_off_LR_Gd; k_off_LR_Gd is "k_off_LR·Gd";
  k_Ef_Gd = 0.00062;
  K_d_Gd_Gbg = 0.01; K_d_Gd_Gbg is "K_d_Gd·Gbg";
  k_Hf_RrgsGt = 0.28;
  rgs_tot = 6000;
  K_d_R_rgs = 328; K_d_R_rgs is "K_d_R·rgs";
  k_off_R_rgs = 3; k_off_R_rgs is "k_off_R·rgs";
  var k_on_R_rgs; k_on_R_rgs is "k_on_R.rgs";
  Initial_for_K_d_R_rgs = K_d_R_rgs; Initial_for_K_d_R_rgs is "Initial for K_d_R·rgs";
  Initial_for_k_Hf_RrgsGt = k_Hf_RrgsGt;
  Initial_for_k_off_R_rgs = k_off_R_rgs; Initial_for_k_off_R_rgs is "Initial for k_off_R·rgs";

  // Assignment rules:
  k_Ef_G := k_Ef_Gd;
  k_off_LR_G := k_off_R_G;
  tot_RG := RG + RGd + RGt + LRG + LRGd + LRGt + RrgsG + RrgsGd + RrgsGt + LRrgsG + LRrgsGd + LRrgsGt;
  k_Af_Gd := 1.66*0.13;
  k_Hf_LRGt := k_Hf_RGt;
  k_Af_LRGd := k_Af_Gd;
  k_Af_RGd := k_Af_Gd;
  k_on_L_R := L*(k_off_L_R/K_d_L_R);
  k_off_L_RG := k_off_L_R;
  k_on_L_RG := L*(k_off_L_RG/(lambda*K_d_L_R));
  k_off_L_RGt := k_off_L_R;
  k_on_L_RGt := L*(k_off_L_RGt/(lambda_t*K_d_L_R));
  k_off_L_RGd := k_off_L_R;
  k_on_L_RGd := L*(k_off_L_RGd/(lambda_d*K_d_L_R));
  k_on_R_G := k_off_R_G/(K_d_R_G/1.66);
  k_on_LR_G := k_off_LR_G/(lambda*(K_d_R_G/1.66));
  k_off_R_Gt := k_off_R_G;
  k_on_R_Gt := k_off_R_Gt/(eta*(K_d_R_G/1.66));
  k_off_LR_Gt := k_off_R_G;
  k_on_LR_Gt := k_off_LR_Gt/(lambda_t*eta*(K_d_R_G/1.66));
  k_off_R_Gd := k_off_R_G;
  k_on_R_Gd := k_off_R_Gd/(rho*(K_d_R_G/1.66));
  k_off_LR_Gd := k_off_R_G;
  k_on_LR_Gd := k_off_LR_Gd/(lambda_d*rho*(K_d_R_G/1.66));
  k_Ar_Gd := k_Af_Gd/1.66*K_d_Gd_Gbg;
  k_Ar_RGd := k_Af_RGd/1.66*K_d_Gd_Gbg/rho;
  k_Ar_LRGd := lambda*(k_Af_LRGd/1.66)*K_d_Gd_Gbg/(lambda_d*rho);
  tot_LR := LRG + LRGd + LRGt + LR + LRrgsG + LRrgsGd + LRrgsGt + LRrgs;
  tot_G := G + LRG + RG + LRrgsG + RrgsG;
  tot_Gd := Gd + LRGd + RGd + LRrgsGd + RrgsGd;
  tot_Gt := Gt + LRGt + RGt + RrgsGt + LRrgsGt;
  k_Ef_RGd := k_Ef_RG;
  k_Ef_LRGd := k_Ef_LRG;
  k_Hf_LRrgsGt := Initial_for_k_Hf_RrgsGt;
  k_on_R_rgs := Initial_for_k_off_R_rgs/(Initial_for_K_d_R_rgs/1.66);
  tot_Rrgs := LRrgs + LRrgsG + LRrgsGd + LRrgsGt + Rrgs + RrgsG + RrgsGd + RrgsGt;

  // Reactions:
  binding_R_rgs: R + rgs -> Rrgs; k_on_R_rgs*R*rgs - k_off_R_rgs*Rrgs; binding_R_rgs is "binding_R·rgs";
  binding_LRG_rgs: LRG + rgs -> LRrgsG; k_on_R_rgs*LRG*rgs - k_off_R_rgs*LRrgsG; binding_LRG_rgs is "binding_LRG·rgs";
  binding_RGt_rgs: RGt + rgs -> RrgsGt; k_on_R_rgs*RGt*rgs - k_off_R_rgs*RrgsGt; binding_RGt_rgs is "binding_RGt·rgs";
  binding_LRGt_rgs: LRGt + rgs -> LRrgsGt; k_on_R_rgs*LRGt*rgs - k_off_R_rgs*LRrgsGt; binding_LRGt_rgs is "binding_LRGt·rgs";
  binding_RGd_rgs: RGd + rgs -> RrgsGd; k_on_R_rgs*RGd*rgs - k_off_R_rgs*RrgsGd; binding_RGd_rgs is "binding_RGd·rgs";
  binding_LRGd_rgs: LRGd + rgs -> LRrgsGd; k_on_R_rgs*LRGd*rgs - k_off_R_rgs*LRrgsGd; binding_LRGd_rgs is "binding_LRGd·rgs";
  hydrolysis_LRrgsGt: LRrgsGt => LRrgsGd; PM*k_Hf_LRrgsGt*LRrgsGt;
  hydrolysis_RrgsGt: RrgsGt => RrgsGd; PM*k_Hf_RrgsGt*RrgsGt;

  // Unit definitions:
  unit length = metre;
  unit area = metre^2;
  unit volume = 1e-15 litre;
  unit time = second;
  unit substance = item;
end
